<Node name="root" gravity="0 0 0" dt="0.01" >
    <RequiredPlugin pluginName="Sofa.Component.Collision.Geometry"/> <!-- Needed to use components [SphereCollisionModel] -->
    <RequiredPlugin pluginName="Sofa.Component.Setting"/> <!-- Needed to use components [BackgroundSetting] -->
    <RequiredPlugin pluginName="Sofa.Component.StateContainer"/> <!-- Needed to use components [MechanicalObject] -->
    <RequiredPlugin pluginName="Sofa.Component.Topology.Container.Grid"/> <!-- Needed to use components [RegularGridTopology] -->
    <RequiredPlugin pluginName="Sofa.Component.Visual"/> <!-- Needed to use components [VisualStyle] -->

	<VisualStyle name="visualStyle1"  displayFlags="hideVisual 	hideBehaviorModels showCollisionModels" />
	<BackgroundSetting color="0.5 0.5 0.5" />
	<DefaultAnimationLoop/>

	<Node name="Example">
		<RegularGridTopology n="50 50 50"  min="0 0 0" max="10 10 10" />
        	<MechanicalObject name="DOFs" template="Vec3" />
        	<SphereCollisionModel radius="0.1" />
    </Node >

</Node>
